// COMSOL Multiphysics 5.4.0.388 model "Elecromagnetic model.mph"
// Outline of the model tree

Functions
  wv1: Wave "Waveform 1" | freq = 2*pi

Geometry
  geom1 "Geometry 1" (3D, length unit cm)
    pi4: PartInstance "Coil simplified 1" | part = part1; selkeepnoncontr = off; lengthunit = cm
    pi2: PartInstance "Teeth 1" | part = part2; selkeepnoncontr = off; lengthunit = cm
    pi3: PartInstance "Rail 1" | part = part3; displ = {0, 0, 10}; selkeepnoncontr = off; lengthunit = cm
    blk1: Block | size = {1, 1, 1}
    fin: Finalize "Form Union"
  part1 "Coil simplified" (3D, length unit cm)
    cyl1: Cylinder | r = 2; h = 5
    cyl2: Cylinder | r = 1.9; h = 5
    dif1: Difference | input = cyl1; input2 = cyl2
  part2 "Teeth" (3D, length unit cm)
    blk1: Block "Backplane" | size = {45, 3, 3}
    blk2: Block "Tooth" | pos = {0, 0, 3}; size = {3, 3, 5}
    blk3: Block "Tooth 1" | pos = {6, 0, 3}; size = {3, 3, 5}
    blk4: Block "Tooth 1.1" | pos = {12, 0, 3}; size = {3, 3, 5}
    blk5: Block "Tooth 1.1.1" | pos = {18, 0, 3}; size = {3, 3, 5}
    blk6: Block "Tooth 1.1.1.1" | pos = {24, 0, 3}; size = {3, 3, 5}
    blk7: Block "Tooth 1.1.1.1.1" | pos = {30, 0, 3}; size = {3, 3, 5}
    blk8: Block "Tooth 1.1.1.1.1.1" | pos = {36, 0, 3}; size = {3, 3, 5}
    blk9: Block "Tooth 1.1.1.1.1.1.1" | pos = {42, 0, 3}; size = {3, 3, 5}
  part3 "Rail" (3D, length unit cm)
    blk1: Block | size = {45, 3, 10}

Materials
  mat3: Common "Cu - Copper" on domains 1
    def "Basic"
      electricconductivity = 58.1e6[S/m]
      thermalexpansioncoefficient = 16.5e-6[1/K]
      heatcapacity = 384[J/(kg*K)]
      density = 8960[kg/m^3]
      thermalconductivity = 401[W/(m*K)]
    Enu "Young's modulus and Poisson's ratio"
      youngsmodulus = 120e9[Pa]
      poissonsratio = 0.34
  mat1: Common "Low Carbon Steel Soft Iron" on domains 2-4, 6-15
    def "Basic"
      electricconductivity = 10.15[MS/m]
      relpermittivity = 1[1]
      relpermeability = 4000
    BHCurve
      normB = BH(normHin)
      normH = BH_inv(normBin)
      Wpm = BH_prim(normHin)
      normHin = sqrt(H1^2+H2^2+H3^2)
      normBin = sqrt(B1^2+B2^2+B3^2)
      DESCR_PREFIX:normHin = Magnetic field norm
      DESCR_PREFIX:normBin = Magnetic flux density norm
      BH: Interpolation
        table = 
          {0, 0}
          {47.0221046875, 0.222066666667}
          {92.8533875, 0.434933333333}
          {136.3030265625, 0.6294}
          {176.1802, 0.796266666667}
          {211.831046614583, 0.929125}
          {244.749547916667, 1.03273333333}
          {276.96664609375, 1.11464166667}
          {310.513283333333, 1.1824}
          {347.238178645833, 1.24231458333}
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        extrap = linear
        argunit = A/m
        fununit = T
        defineinv = on
        defineprimfun = on
  mat2: Common "Soft Iron (With Losses)" on domains 5
    def "Basic"
      electricconductivity = 1.12e7[S/m]
      relpermittivity = 1
      relpermeability = 200
    BHCurve
      normB = BH(normHin)
      normH = BH_inv(normBin)
      Wpm = BH_prim(normHin)
      normHin = sqrt(H1^2+H2^2+H3^2)
      normBin = sqrt(B1^2+B2^2+B3^2)
      DESCR_PREFIX:normHin = Magnetic field norm
      DESCR_PREFIX:normBin = Magnetic flux density norm
      BH: Interpolation
        table = {{0, 0}, {663.146, 1}, {1067.5, 1.1}, {1705.23, 1.2}, {2463.11, 1.3}, {3841.67, 1.4}, {5425.74, 1.5}, {7957.75, 1.6}, {12298.3, 1.7}, {20462.8, 1.8}, {32169.6, 1.9}, {61213.4, 2.0}, {111408, 2.1}, {175070, 2.2}, {261469, 2.3}, {318310, 2.4}}
        extrap = linear
        argunit = A/m
        fununit = T
        defineinv = on
        defineprimfun = on
    EffectiveBHCurve
      normBeff = BHeff(normHeffin)
      normHeff = BHeff_inv(normBeffin)
      normHeffin = sqrt(realdot(H1,H1)+realdot(H2,H2)+realdot(H3,H3))
      normBeffin = sqrt(realdot(B1,B1)+realdot(B2,B2)+realdot(B3,B3))
      DESCR_PREFIX:normHeffin = Effective magnetic field norm
      DESCR_PREFIX:normBeffin = Effective magnetic flux density norm
      BHeff: Interpolation
        table = 
          {0, 0}
          {663.146, 1}
          {1067.5, 1.49439064869}
          {1705.23, 1.94163007382}
          {2463.11, 2.25761949405}
          {3841.67, 2.72975505967}
          {5425.74, 2.87566514896}
          {7957.75, 3.14902923402}
          {12298.3, 3.45293721268}
          {20462.8, 3.7845615956}
          {32169.6, 4.06019591028}
          {61213.4, 4.42177726607}
          {111408, 4.72195400511}
          {175070, 4.94119864969}
          {261469, 5.14465994384}
          {318310, 5.25334603964}
        extrap = linear
        argunit = A/m
        fununit = T
        defineinv = on

Physics
  mf: InductionCurrents "Magnetic Fields" on no domains
    dependent variable A = {Ax, Ay, Az}
    al1: AmperesLaw "Ampère's Law 1" (default)
    mi1: MagneticInsulation (default)
    init1: init "Initial Values 1" (default)
    coil1: Coil on no domains | ConductorModel = Multi
      cre1: CoilReferenceEdge "Coil Geometry 1" on no edges

Mesh
  mesh1 "Mesh 1" (physics-controlled)

Studies
  std1 "Study 1"
    freq: Frequency "Frequency Domain"

Solver configurations
  sol1 "Solution 1" (study std1)

Datasets
  dset1: Solution | solution = sol1

Plots
  pg1: PlotGroup3D "3D Plot Group 1"