// COMSOL Multiphysics 5.5.0.306 model "Linear motor.mph"
// Outline of the model tree

Parameters
  I = 10  // Amp/mm2
  T_width = Tot_width/(N_tooth+N_slot/k)  // cm
  O_amp = Frequency*t*2*pi
  Tot_width = 50
  k = 1
  w_slot = (Tot_width-N_tooth*T_width)/N_slot
  N_tooth = 14
  N_slot = N_tooth-1
  w_wind = w_slot/4
  h_air = 0.5
  Frequency = 0.3  // Hz
  t = 0
  h_tooth = 6.6
  h_backplate = 2.2

Selections
  sel2: Explicit "Core coils" on domains 5-28
  sel3: Explicit "Core" on domains 4-28

Probes
  var1: GlobalVariable "Force Probe X"
    expr = mf.Forcex_f_rail
    unit = N
    descr = Electromagnetic force, x component
    table = tbl3
  var2: GlobalVariable "Force Probe Y"
    expr = mf.Forcey_f_rail
    unit = N
    descr = Electromagnetic force, y component
    table = tbl3

Geometry
  geom1 "Geometry 1" (2D, length unit cm)
    r19: Rectangle "Air" | pos = {-10, -2}; size = {Tot_width+20, 18}
    pi1: PartInstance "Stator 1" | part = part2; selkeepnoncontr = off; lengthunit = cm
    pi2: PartInstance "Rotor 1" | part = part3; selkeepnoncontr = off; lengthunit = cm
    fin: Finalize "Form Union"
  part1 "Coil" (2D, length unit cm)
    r1: Rectangle "Core" | size = {T_width, h_tooth}
    r2: Rectangle "Wind Right" | pos = {T_width, w_wind}; size = {w_wind, h_tooth-w_wind}
    r3: Rectangle "Wind Left" | pos = {-w_wind, w_wind}; size = {w_wind, h_tooth-w_wind}
    r5: Rectangle "Core Left Corner Front" | pos = {-w_wind, 0}; size = {w_wind, w_wind}
    fil1: Fillet "Core Left Corner Filet" (disabled) | point = r5(1) points 2; radius = w_wind
    r6: Rectangle "Core Left Corner Back" (disabled) | pos = {-w_wind, 0}; size = {w_wind, w_wind}
    dif1: Difference "Core Left Corner" (disabled) | input = r6; input2 = fil1
    r7: Rectangle "Core Right Corner Front" | pos = {T_width, 0}; size = {w_wind, w_wind}
    fil2: Fillet "Core RightCorner Filet" (disabled) | point = r7(1) points 1; radius = w_wind
    r8: Rectangle "Core RightCorner Back" (disabled) | pos = {T_width, 0}; size = {w_wind, w_wind}
    dif2: Difference "Core Right Corner 1" (disabled) | input = r8; input2 = fil2
    uni1: Union "Tooth" | input = r1, r5, r7; intbnd = off; edge = all
  part2 "Stator" (2D, length unit cm)
    pi1: PartInstance "Coil 1" | part = part1; displ = {w_slot+T_width, h_backplate}; lengthunit = cm
    arr1: Array | input = pi1; size = {N_tooth-2, 1}; fullsize = {N_tooth-2, 1}; displ = {w_slot+T_width, 0}
    r1: Rectangle "Backplate" | size = {Tot_width, h_backplate}
    r2: Rectangle "End Left" | pos = {0, h_backplate}; size = {T_width, h_tooth}
    r3: Rectangle "End Right" | pos = {Tot_width-T_width, h_backplate}; size = {T_width, h_tooth}
    uni1: Union "Core"
      input = r1, r2, r3, arr1(1,1,3), arr1(2,1,3), arr1(3,1,3), arr1(4,1,3), arr1(5,1,3), arr1(6,1,3), arr1(7,1,3), arr1(8,1,3), arr1(9,1,3), arr1(10,1,3), arr1(11,1,3), arr1(12,1,3)
      intbnd = off
      edge = all
    uni2: Union "Coils"
      input = arr1(1,1,1), arr1(1,1,2), arr1(10,1,1), arr1(10,1,2), arr1(11,1,1), arr1(11,1,2), arr1(12,1,1), arr1(12,1,2), arr1(2,1,1), arr1(2,1,2), arr1(3,1,1), arr1(3,1,2), arr1(4,1,1), arr1(4,1,2), arr1(5,1,1), arr1(5,1,2), arr1(6,1,1), arr1(6,1,2), arr1(7,1,1), arr1(7,1,2), arr1(8,1,1), arr1(8,1,2), arr1(9,1,1), arr1(9,1,2)
  part3 "Rotor" (2D, length unit cm)
    r1: Rectangle "Rail" | pos = {-5, h_tooth+h_backplate+h_air}; size = {Tot_width+10, 5}
    r2: Rectangle "Aluminum" | pos = {-5, h_tooth+h_backplate+h_air-0.2-0.1}; size = {Tot_width+10, 0.2}

Materials
  mat1: Common "Rail Material" on domains 3
    def "Basic"
      electricconductivity = 1e6[S/m]
      relpermittivity = 1
      relpermeability = 200
      youngsmodulus = 1e10
      poissonsratio = 1
      density = 8000
    BHCurve
      normB = BH(normHin)
      normH = BH_inv(normBin)
      Wpm = BH_prim(normHin)
      normHin = sqrt(H1^2+H2^2+H3^2+eps)
      normBin = sqrt(B1^2+B2^2+B3^2+eps)
      DESCR_PREFIX:normHin = Magnetic field norm
      DESCR_PREFIX:normBin = Magnetic flux density norm
      BH: Interpolation
        table = {{0, 0}, {663.146, 1}, {1067.5, 1.1}, {1705.23, 1.2}, {2463.11, 1.3}, {3841.67, 1.4}, {5425.74, 1.5}, {7957.75, 1.6}, {12298.3, 1.7}, {20462.8, 1.8}, {32169.6, 1.9}, {61213.4, 2.0}, {111408, 2.1}, {175070, 2.2}, {261469, 2.3}, {318310, 2.4}}
        extrap = linear
        argunit = A/m
        fununit = T
        defineinv = on
        defineprimfun = on
    EffectiveBHCurve
      normBeff = BHeff(normHeffin)
      normHeff = BHeff_inv(normBeffin)
      normHeffin = sqrt(realdot(H1,H1)+realdot(H2,H2)+realdot(H3,H3)+eps)
      normBeffin = sqrt(realdot(B1,B1)+realdot(B2,B2)+realdot(B3,B3)+eps)
      DESCR_PREFIX:normHeffin = Effective magnetic field norm
      DESCR_PREFIX:normBeffin = Effective magnetic flux density norm
      BHeff: Interpolation
        table = 
          {0, 0}
          {663.146, 1}
          {1067.5, 1.49439064869}
          {1705.23, 1.94163007382}
          {2463.11, 2.25761949405}
          {3841.67, 2.72975505967}
          {5425.74, 2.87566514896}
          {7957.75, 3.14902923402}
          {12298.3, 3.45293721268}
          {20462.8, 3.7845615956}
          {32169.6, 4.06019591028}
          {61213.4, 4.42177726607}
          {111408, 4.72195400511}
          {175070, 4.94119864969}
          {261469, 5.14465994384}
          {318310, 5.25334603964}
        extrap = linear
        argunit = A/m
        fununit = T
        defineinv = on
  mat2: Common "Core Material" on domains 4
    def "Basic"
      electricconductivity = 1e6[S/m]
      relpermittivity = 1
      relpermeability = 4000
      youngsmodulus = 1e10
      poissonsratio = 1
      density = 8000
    BHCurve
      normB = BH(normHin)
      normH = BH_inv(normBin)
      Wpm = BH_prim(normHin)
      normHin = sqrt(H1^2+H2^2+H3^2+eps)
      normBin = sqrt(B1^2+B2^2+B3^2+eps)
      DESCR_PREFIX:normHin = Magnetic field norm
      DESCR_PREFIX:normBin = Magnetic flux density norm
      BH: Interpolation
        table = {{0, 0}, {663.146, 1}, {1067.5, 1.1}, {1705.23, 1.2}, {2463.11, 1.3}, {3841.67, 1.4}, {5425.74, 1.5}, {7957.75, 1.6}, {12298.3, 1.7}, {20462.8, 1.8}, {32169.6, 1.9}, {61213.4, 2.0}, {111408, 2.1}, {175070, 2.2}, {261469, 2.3}, {318310, 2.4}}
        extrap = linear
        argunit = A/m
        fununit = T
        defineinv = on
        defineprimfun = on
    EffectiveBHCurve
      normBeff = BHeff(normHeffin)
      normHeff = BHeff_inv(normBeffin)
      normHeffin = sqrt(realdot(H1,H1)+realdot(H2,H2)+realdot(H3,H3)+eps)
      normBeffin = sqrt(realdot(B1,B1)+realdot(B2,B2)+realdot(B3,B3)+eps)
      DESCR_PREFIX:normHeffin = Effective magnetic field norm
      DESCR_PREFIX:normBeffin = Effective magnetic flux density norm
      BHeff: Interpolation
        table = 
          {0, 0}
          {663.146, 1}
          {1067.5, 1.49439064869}
          {1705.23, 1.94163007382}
          {2463.11, 2.25761949405}
          {3841.67, 2.72975505967}
          {5425.74, 2.87566514896}
          {7957.75, 3.14902923402}
          {12298.3, 3.45293721268}
          {20462.8, 3.7845615956}
          {32169.6, 4.06019591028}
          {61213.4, 4.42177726607}
          {111408, 4.72195400511}
          {175070, 4.94119864969}
          {261469, 5.14465994384}
          {318310, 5.25334603964}
        extrap = linear
        argunit = A/m
        fununit = T
        defineinv = on
  mat3: Common "Copper" on domains 5-28
    def "Basic"
      relpermeability = 1
      electricconductivity = 5.998e7[S/m]
      heatcapacity = 385[J/(kg*K)]
      relpermittivity = 1
      emissivity = 0.5
      density = 8940[kg/m^3]
      thermalconductivity = 400[W/(m*K)]
    Enu "Young's modulus and Poisson's ratio"
      youngsmodulus = 126e9[Pa]
      poissonsratio = 0.34
    linzRes "Linearized resistivity"
      rho0 = 1.667e-8[ohm*m]
      alpha = 3.862e-3[1/K]
      Tref = 293.15[K]
  mat5: Common "Aluminum" on domains 2
    def "Basic"
      relpermeability = 1
      heatcapacity = 900[J/(kg*K)]
      thermalconductivity = 238[W/(m*K)]
      electricconductivity = 3.774e7[S/m]
      relpermittivity = 3
      thermalexpansioncoefficient = 23e-6[1/K]
      density = 2700[kg/m^3]
    Enu "Young's modulus and Poisson's ratio"
      youngsmodulus = 70e9[Pa]
      poissonsratio = 0.33
    Murnaghan
      l = -2.5e11[Pa]
      m = -3.3e11[Pa]
      n = -3.5e11[Pa]
    Lame "Lamé parameters"
      lambLame = 5.1e10[Pa]
      muLame = 2.6e10[Pa]
  mat4: Common "Air" on domains 1
    def "Basic"
      thermalexpansioncoefficient = alpha_p(pA,T)
      molarmass = 0.02897
      bulkviscosity = muB(T)
      relpermeability = 1
      relpermittivity = 1
      dynamicviscosity = eta(T)
      ratioofspecificheat = 1.4
      electricconductivity = 1e-15[S/m]
      heatcapacity = Cp(T)
      density = rho(pA,T)
      thermalconductivity = k(T)
      soundspeed = cs(T)
      youngsmodulus = 1
      poissonsratio = 1
      eta: Piecewise | arg = T; pieces = {200.0, 1600.0, -8.38278E-7+8.35717342E-8*T^1-7.69429583E-11*T^2+4.6437266E-14*T^3-1.06585607E-17*T^4}; argunit = K; fununit = Pa*s
      Cp: Piecewise | arg = T; pieces = {200.0, 1600.0, 1047.63657-0.372589265*T^1+9.45304214E-4*T^2-6.02409443E-7*T^3+1.2858961E-10*T^4}; argunit = K; fununit = J/(kg*K)
      rho: Analytic | expr = pA*0.02897/R_const[K*mol/J]/T; args = {pA, T}; dermethod = manual; argders = {{pA, d(pA*0.02897/R_const/T,pA)}, {T, d(pA*0.02897/R_const/T,T)}}; argunit = Pa,K; fununit = kg/m^3
      k: Piecewise | arg = T; pieces = {200.0, 1600.0, -0.00227583562+1.15480022E-4*T^1-7.90252856E-8*T^2+4.11702505E-11*T^3-7.43864331E-15*T^4}; argunit = K; fununit = W/(m*K)
      cs: Analytic | expr = sqrt(1.4*R_const[K*mol/J]/0.02897*T); args = T; dermethod = manual; argunit = K; fununit = m/s
      an1: Analytic | funcname = alpha_p; expr = -1/rho(pA,T)*d(rho(pA,T),T); args = {pA, T}; argunit = Pa,K; fununit = 1/K
      an2: Analytic "Analytic 2a" | funcname = muB; expr = 0.6*eta(T); args = T; argunit = K; fununit = Pa*s
    RefractiveIndex
      n = 1
      ki = 0
    NonlinearModel
      BA = (def.gamma+1)/2

Physics
  mf: InductionCurrents "Magnetic Fields" on all domains
    dependent variable A = {Ax, Ay, Az}
    d.d = 0.03
    al1: AmperesLaw "Ampère's Law Air" (default) | ConstitutiveRelationBH = RelativePermeability; materialType = from_mat
    mi1: MagneticInsulation (default)
    init1: init "Initial Values 1" (default)
    al3: AmperesLaw "Ampère's Law Rail" on domains 3 | materialType = from_mat
    al2: AmperesLaw "Ampère's Law Core" on domains 4
      ConstitutiveRelationBH = RelativePermeability
      materialType = from_mat
    ecd1: ExternalCurrentDensity "Phase 1+" on domains 5, 12, 17, 24 | Je = {0, 0, cos(O_amp)*I*1e6}
    ecd2: ExternalCurrentDensity "Phase 1-" on domains 6, 11, 18, 23 | Je = {0, 0, -cos(O_amp)*I*1e6}
    ecd3: ExternalCurrentDensity "Phase 2+" on domains 8, 13, 20, 25 | Je = {0, 0, cos(O_amp+2*pi/3)*I*1e6}
    ecd4: ExternalCurrentDensity "Phase 2-" on domains 7, 14, 19, 26 | Je = {0, 0, -cos(O_amp+2*pi/3)*I*1e6}
    ecd5: ExternalCurrentDensity "Phase 3+" on domains 9, 16, 21, 28 | Je = {0, 0, cos(O_amp-2*pi/3)*I*1e6}
    ecd6: ExternalCurrentDensity "Phase 3-" on domains 10, 15, 22, 27 | Je = {0, 0, -cos(O_amp-2*pi/3)*I*1e6}
    fcal2: ForceCalculation on domains 2 | ForceName = f_rail; TorqueAxis = {0, 0, 1}
  solid: SolidMechanics (disabled) on domains 4-28
    dependent variable u = {u, v, w}
    lemm1: LinearElasticModel "Linear Elastic Material 1" (default)
    free1: Free (default)
    init1: init "Initial Values 1" (default)
    fix1: Fixed "Fixed Constraint 1" on all domains
  mef: ElectricInductionCurrents "Magnetic and Electric Fields" (disabled) on all domains
    dependent variable A2 = {A2x, A2y, A2z}
    d.d = 0.03
    alc1: ElectromagneticModel "Ampère's Law and Current Conservation 1" (default) | materialType = from_mat
    mi1: MagneticInsulation (default)
      ein1: ElectricInsulation (default)
    init1: init "Initial Values 1" (default)
    ecd1: ExternalCurrentDensity "Phase 1+" on domains 5, 12, 17, 24
      Je = {0, 0, cos(O_amp)*I*1e6}
      ExternalLossesType = sigma
    ecd2: ExternalCurrentDensity "Phase 1-" on domains 6, 11, 18, 23
      Je = {0, 0, -cos(O_amp)*I*1e6}
      ExternalLossesType = sigma
    ecd3: ExternalCurrentDensity "Phase 2+" on domains 8, 13, 20, 25
      Je = {0, 0, cos(O_amp+2*pi/3)*I*1e6}
      ExternalLossesType = sigma
    ecd4: ExternalCurrentDensity "Phase 2-" on domains 7, 14, 19, 26
      Je = {0, 0, -cos(O_amp+2*pi/3)*I*1e6}
      ExternalLossesType = sigma
    ecd5: ExternalCurrentDensity "Phase 3+" on domains 9, 16, 21, 28
      Je = {0, 0, cos(O_amp-2*pi/3)*I*1e6}
      ExternalLossesType = sigma
    ecd6: ExternalCurrentDensity "Phase 3-" on domains 10, 15, 22, 27
      Je = {0, 0, -cos(O_amp-2*pi/3)*I*1e6}
      ExternalLossesType = sigma
    al1: AmperesLaw "Ampère's Law Rail" on domains 3 | materialType = from_mat
    al2: AmperesLaw "Ampère's Law Core" on domains 4 | materialType = from_mat
    fcal1: ForceCalculation on domains 2, 3

Mesh
  mesh1 "Mesh 1" (physics-controlled)

Studies
  std3 "Magnetic field and force Study"
    param: Parametric "Parametric Sweep" (disabled)
      pname = Frequency
      plistarr = range(0,5,100)
      useaccumtable = on
      accumtable = new
    stat: Stationary
    time: Transient "Time Dependent" | tlist = range(0,0.01,10); useinitsol = on

Solver configurations
  sol5 "Solution 5" (study std3)
    v1: Variables "Dependent Variables 1"
    s1: Stationary "Stationary Solver 1"
      dDef: Direct
      fc1: FullyCoupled | linsolver = dDef
    su1: StoreSolution "Solution Store 1"
    v2: Variables "Dependent Variables 2" | initmethod = sol; notsolmethod = sol
    t1: Time "Time-Dependent Solver 1" | tlist = range(0,0.01,10); tstepsbdf = intermediate; estrat = exclude
      dDef: Direct
      fc1: FullyCoupled | linsolver = dDef
  sol8 "Parametric Solutions 3" (study std3)
  sol9 "Solution Store 1" (study std3)

Datasets
  dset3: Solution | solution = none
  dset4: Solution | solution = sol5
  dset5: Solution "Probe Solution 5" | solution = sol5
  dset7: Solution | solution = sol8
  dset8: Solution | solution = sol9

Derived values
  gev1: EvalGlobal "Force Probe X" | data = dset5; table = tbl3; expr = mf.Forcex_f_rail
  gev2: EvalGlobal "Force Probe Y" | data = dset5; table = tbl3; expr = mf.Forcey_f_rail

Tables
  tbl3: Table "Probe Table 3"
    Time (s) | Electromagnetic force, x component (N) | Electromagnetic force, y component (N)
    0 | -3.82503 | -0.300312
    0.01 | -3.63523 | -0.303266
    0.02 | -3.40387 | -0.306259
    0.03 | -3.16576 | -0.309207
    0.04 | -2.92824 | -0.311952
    0.05 | -2.69611 | -0.314429
    0.06 | -2.47043 | -0.316648
    0.07 | -2.25136 | -0.318608
    0.08 | -2.03872 | -0.32031
    0.09 | -1.83227 | -0.321754
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
Plots
  pg1: PlotGroup1D "Probe Plot Group 1" | data = none
    tblp1: Table "Probe Table Graph 1" | table = tbl3
  pg2: PlotGroup2D "2D Plot Group 2" | data = dset8
    con1: Contour | expr = mf.normB
    surf1: Surface | expr = mf.normB
    arws1: ArrowSurface | expr = {mf.Bx, mf.By}; xnumber = 150; ynumber = 50; arrowlength = logarithmic